# OpenSim document version 40000
XsensDataReaderSettings:
  trial_prefix: MT_01200585-021-000
  ExperimentalSensors:
    ExperimentalSensor _00B49D8C: name_in_model=torso_imu
    ExperimentalSensor _00B49D7B: name_in_model=pelvis_imu
    ExperimentalSensor _00B49D87: name_in_model=tibia_r_imu
    ExperimentalSensor _00B49D94: name_in_model=femur_r_imu
    ExperimentalSensor _00B49D86: name_in_model=tibia_l_imu
    ExperimentalSensor _00B49D7F: name_in_model=femur_l_imu
    ExperimentalSensor _00B49D7D: name_in_model=calcn_r_imu
    ExperimentalSensor _00B49D85: name_in_model=calcn_l_imu
